*Heading
** Job name: Flat_Cell_Parallel_ER_Protrusion Model name: Model-1
** Generated by: Abaqus/CAE 2021.HF6
*Preprint, echo=NO, model=NO, history=NO, contact=NO
**
** PARTS
**
*Part, name=Parallel_ER
*Node
      1,          20.,          20.,          0.5
      2,          20., 3.32397491e-07,          0.5
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*Element, type=C3D10
   1,  1879,  1880,  1592,  1618,  2621,  2620,  2619,  2623,  2622,  2624
   2,  1879,  1881,   125,   535,  2627,  2626,  2625,  2629,  2628,  2630
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*Element, type=B31
9045,   5, 291
9046, 291, 292
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*Nset, nset=Set-1
     1,     2,     3,     4,     5,     6
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*Elset, elset=Set-1
    1,    2,    3,    4,    5,    6
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*Nset, nset=Set-2
   5,   6,   7,   8,   9,  10
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*Elset, elset=Set-2, generate
 9045,  9287,     1
*Nset, nset=Set-5
   5,   6,   7,   8,   9,  10
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*Elset, elset=Set-5, generate
 9045,  9287,     1
*Nset, nset=Set-6
   5,   6,   7,   8,   9,  10
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*Elset, elset=Set-6, generate
 9045,  9287,     1
*Nset, nset=Set-7
    14,    15,    16,    26,    27,    28
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*Elset, elset=Set-7, generate
 8721,  9044,     1
*Nset, nset=Set-8
     1,     2,     3,     4,     5,     6
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*Elset, elset=Set-8, generate
    1,  8720,     1
** Section: Cyto
*Solid Section, elset=Set-8, material=Cytoplasm
,
** Section: Cortex
*Solid Section, elset=Set-7, material=Actin_Cortex
,
** Section: ER  Profile: ER_Square
*Beam Section, elset=Set-5, material=ER, temperature=GRADIENTS, section=RECT
0.0781, 0.1
0.,0.,-1.
*End Part
**
**
** ASSEMBLY
**
*Assembly, name=Assembly
**
*Instance, name=Parallel_ER-1, part=Parallel_ER
*End Instance
**
*Nset, nset=Parallel_ERs, instance=Parallel_ER-1
   5,   6,   7,   8,   9,  10
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*Elset, elset=Parallel_ERs, instance=Parallel_ER-1, generate
 9045,  9287,     1
*Nset, nset=Set-35, instance=Parallel_ER-1
     1,     2,     3,     4,    31,    32
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*Elset, elset=Set-35, instance=Parallel_ER-1
  186,  192,  204,  285,  327,  376
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*Nset, nset=Set-36, instance=Parallel_ER-1
     2,     3,     5,     6,     7,     8
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*Elset, elset=Set-36, instance=Parallel_ER-1
   13,   18,   48,   61,   77,   86
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*Nset, nset=Set-37, instance=Parallel_ER-1
     1,     4,    16,    17,    18,    19
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*Elset, elset=Set-37, instance=Parallel_ER-1
   25,   31,   37,   55,   56,  814
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*Nset, nset=Set-38, instance=Parallel_ER-1
     2,     3,     5,     6,     7,     8
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*Elset, elset=Set-38, instance=Parallel_ER-1
   13,   18,   48,   61,   77,   86
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*Nset, nset=Set-39, instance=Parallel_ER-1
     1,     4,    16,    17,    18,    19
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*Elset, elset=Set-39, instance=Parallel_ER-1
   25,   31,   37,   55,   56,  814
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*Nset, nset=Set-40, instance=Parallel_ER-1
     1,     2,     3,     4,     5,     6
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*Elset, elset=Set-40, instance=Parallel_ER-1
   13,   18,   25,   31,   37,   48
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*End Assembly
**
** MATERIALS
**
*Material, name=Actin_Cortex
*Depvar
     46,
*User Material, constants=6
 0.073,  0.45,    1., 0.001,   0.1,    1.
*Material, name=Cytoplasm
*Elastic
 0.073, 0.45
*Material, name=ER
*Elastic
 19.3, 0.45
**
** BOUNDARY CONDITIONS
**
** Name: BC-1 Type: Symmetry/Antisymmetry/Encastre
*Boundary
Set-35, ENCASTRE
** Name: BC-2 Type: Symmetry/Antisymmetry/Encastre
*Boundary
Set-40, YSYMM
** ----------------------------------------------------------------
**
** STEP: Step-1
**
*Step, name=Step-1, nlgeom=NO
*Static
0.1, 1., 1e-06, 1.
**
** OUTPUT REQUESTS
**
*Restart, write, frequency=0
**
** FIELD OUTPUT: F-Output-1
**
*Output, field
*Node Output
CF, RF, U
*Element Output, directions=YES
ELEDEN, LE, PE, PEEQ, PEMAG, S
*Contact Output
CDISP, CSTRESS
**
** HISTORY OUTPUT: H-Output-1
**
*Output, history, variable=PRESELECT
**
** HISTORY OUTPUT: H-Output-2
**
*Output, history
*Energy Output, elset=Parallel_ERs, variable=PRESELECT
*End Step
