*Heading
** Job name: Flat_Cell_Perpendicular_ER_Protrusion Model name: Model-1
** Generated by: Abaqus/CAE 2021.HF6
*Preprint, echo=NO, model=NO, history=NO, contact=NO
**
** PARTS
**
*Part, name=Perp_ER
*Node
      1,           0., 3.32397491e-07,          0.5
      2,           0.,          20.,          0.5
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*Element, type=C3D10
   1,  1879,  1180,   114,   113,  2615,  2614,  2613,  2617,  2616,  2618
   2,  1879,  1880,   104,  1749,  2621,  2620,  2619,  2623,  2622,  2624
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*Element, type=B31
9045,  17, 291
9046, 291, 292
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*Nset, nset=Set-1
     1,     2,     3,     4,     5,     6
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*Elset, elset=Set-1
    1,    2,    3,    4,    5,    6
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*Nset, nset=Set-2
   5,   6,   7,   8,   9,  10
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*Elset, elset=Set-2, generate
 9045,  9287,     1
*Nset, nset=Set-3
   5,   6,   7,   8,   9,  10
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*Elset, elset=Set-3, generate
 9045,  9287,     1
*Nset, nset=Set-4
   5,   6,   7,   8,   9,  10
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*Elset, elset=Set-4, generate
 9045,  9287,     1
*Nset, nset=Set-5
     1,     2,     3,     4,     5,     6
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*Elset, elset=Set-5, generate
    1,  8716,     1
*Nset, nset=Set-6
     2,     3,     5,     6,     7,     8
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*Elset, elset=Set-6, generate
 8717,  9044,     1
** Section: Cyto
*Solid Section, elset=Set-5, material=Cytoplasm
,
** Section: Cortex
*Solid Section, elset=Set-6, material=Actin_Cortex
,
** Section: ER  Profile: ER_Circ
*Beam Section, elset=Set-3, material=ER, temperature=GRADIENTS, section=CIRC
0.05
0.,0.,-1.
*End Part
**
**
** ASSEMBLY
**
*Assembly, name=Assembly
**
*Instance, name=Perp_ER-1, part=Perp_ER
*End Instance
**
*Nset, nset=Perp_MTs, instance=Perp_ER-1
   5,   6,   7,   8,   9,  10
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*Elset, elset=Perp_MTs, instance=Perp_ER-1, generate
 9045,  9287,     1
*Nset, nset=Set-30, instance=Perp_ER-1
     1,     2,     3,     4,    31,    32
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*Elset, elset=Set-30, instance=Perp_ER-1
   74,  241,  242,  247,  277,  320
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*Nset, nset=Set-31, instance=Perp_ER-1
     1,     4,    16,    17,    18,    19
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*Elset, elset=Set-31, instance=Perp_ER-1
    6,    9,   40,   69,   71,  427
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*Nset, nset=Set-32, instance=Perp_ER-1
    14,    15,    16,    26,   161,   162
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*Elset, elset=Set-32, instance=Perp_ER-1
   60,   62,   66,  126,  157,  169
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*Nset, nset=Set-33, instance=Perp_ER-1
    14,    15,    16,    26,    29,    30
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*Elset, elset=Set-33, instance=Perp_ER-1
   60,   62,   66,  126,  157,  169
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*Nset, nset=Set-34, instance=Perp_ER-1
     1,     2,     3,     4,    27,    28
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*Elset, elset=Set-34, instance=Perp_ER-1
   74,  241,  242,  247,  277,  320
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*Nset, nset=Set-36, instance=Perp_ER-1
     1,     2,     3,     4,    14,    15
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*Elset, elset=Set-36, instance=Perp_ER-1
   60,   62,   66,   74,  126,  157
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*End Assembly
**
** MATERIALS
**
*Material, name=Actin_Cortex
*Depvar
     46,
*User Material, constants=6
 0.073,  0.45,    1., 0.001,   0.1,    1.
*Material, name=Cytoplasm
*Elastic
 0.073, 0.45
*Material, name=ER
*Elastic
 19.3, 0.45
**
** BOUNDARY CONDITIONS
**
** Name: BC-2 Type: Symmetry/Antisymmetry/Encastre
*Boundary
Set-31, ENCASTRE
** ----------------------------------------------------------------
**
** STEP: Step-1
**
*Step, name=Step-1, nlgeom=NO
*Static
0.1, 1., 1e-06, 1.
**
** BOUNDARY CONDITIONS
**
** Name: BC-3 Type: Symmetry/Antisymmetry/Encastre
*Boundary
Set-36, XSYMM
**
** OUTPUT REQUESTS
**
*Restart, write, frequency=0
**
** FIELD OUTPUT: F-Output-1
**
*Output, field
*Node Output
CF, RF, U
*Element Output, directions=YES
ELEDEN, LE, PE, PEEQ, PEMAG, S
*Contact Output
CDISP, CSTRESS
**
** HISTORY OUTPUT: H-Output-1
**
*Output, history, variable=PRESELECT
**
** HISTORY OUTPUT: H-Output-2
**
*Output, history
*Energy Output, elset=Perp_MTs, variable=PRESELECT
*End Step
