*Heading
** Job name: Negative_R_5_Parallel_Contraction Model name: Model-1
** Generated by: Abaqus/CAE 2021.HF6
*Preprint, echo=NO, model=NO, history=NO, contact=NO
**
** PARTS
**
*Part, name=Neg_R_5
*Node
      1,         19.5,          25.,  0.550000012
      2,          20.,          25.,  0.550000012
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*Element, type=C3D10
    1,  2227,  2228,   933,   845,  3085,  3084,  3083,  3087,  3086,  3088
    2,  2227,  2228,  1698,  2229,  3085,  3090,  3089,  3092,  3091,  3093
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*Element, type=B31
10664,  43, 351
10665, 351, 352
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*Nset, nset=Set-1
   5,   6,   7,   8,   9,  10
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*Elset, elset=Set-1, generate
 10664,  10952,      1
*Nset, nset=Set-2
   5,   6,   7,   8,   9,  10
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*Elset, elset=Set-2, generate
 10664,  10952,      1
*Nset, nset=Set-3
   5,   6,   7,   8,   9,  10
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*Elset, elset=Set-3, generate
 10664,  10952,      1
*Nset, nset=Set-4
     1,     2,     3,     4,     5,     6
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*Elset, elset=Set-4, generate
     1,  10329,      1
*Nset, nset=Set-5
     1,     4,    41,    42,    43,    44
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*Elset, elset=Set-5, generate
 10330,  10663,      1
** Section: Cyto
*Solid Section, elset=Set-4, material=Cytoplasm
,
** Section: Cortex
*Solid Section, elset=Set-5, material=Actin_Cortex
,
** Section: ER  Profile: ER_Rectangular
*Beam Section, elset=Set-1, material=ER, temperature=GRADIENTS, section=RECT
0.1, 0.0691877
0.,0.,-1.
*End Part
**
**
** ASSEMBLY
**
*Assembly, name=Assembly
**
*Instance, name=Neg_R_5-1, part=Neg_R_5
*End Instance
**
*Nset, nset=Parallel_ERs, instance=Neg_R_5-1
   5,   6,   7,   8,   9,  10
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*Elset, elset=Parallel_ERs, instance=Neg_R_5-1, generate
 10664,  10952,      1
*Nset, nset=Set-42, instance=Neg_R_5-1
    19,    20,    22,    23,   123,   124
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*Elset, elset=Set-42, instance=Neg_R_5-1
 1075, 1379, 1383, 1505, 1508, 1754
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*Nset, nset=Set-43, instance=Neg_R_5-1
    22,    23,    24,    25,    26,    27
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*Elset, elset=Set-43, instance=Neg_R_5-1
  291,  603, 1142, 1143, 1701, 2041
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*Nset, nset=Set-44, instance=Neg_R_5-1, generate
     1,  18492,      1
*Elset, elset=Set-44, instance=Neg_R_5-1, generate
     1,  10952,      1
*Nset, nset=Set-45, instance=Neg_R_5-1
    19,    20,    22,    23,   123,   124
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*Elset, elset=Set-45, instance=Neg_R_5-1
 1075, 1379, 1383, 1505, 1508, 1754
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*End Assembly
**
** MATERIALS
**
*Material, name=Actin_Cortex
*Depvar
     46,
*User Material, constants=6
 0.073,  0.45,    1., 0.001,   0.1,    1.
*Material, name=Cytoplasm
*Elastic
 0.073, 0.45
*Material, name=ER
*Elastic
 19.3, 0.45
**
** BOUNDARY CONDITIONS
**
** Name: BC-1 Type: Symmetry/Antisymmetry/Encastre
*Boundary
Set-45, ENCASTRE
** ----------------------------------------------------------------
**
** STEP: Step-1
**
*Step, name=Step-1, nlgeom=NO
*Static
0.001, 1., 1e-06, 1.
**
** OUTPUT REQUESTS
**
*Restart, write, frequency=0
**
** FIELD OUTPUT: F-Output-1
**
*Output, field
*Node Output
CF, RF, U
*Element Output, directions=YES
ELEDEN, LE, PE, PEEQ, PEMAG, S, SVOL
*Contact Output
CDISP, CSTRESS
**
** HISTORY OUTPUT: H-Output-1
**
*Output, history, variable=PRESELECT
**
** HISTORY OUTPUT: H-Output-2
**
*Output, history
*Energy Output, elset=Parallel_ERs, variable=PRESELECT
*End Step
